*HEADING
Native plastic deposition/cold cut history benchmark, mm N MPa C
*NODE,NSET=ALLN
1,0.0,0.0,0.0
2,1.0,0.0,0.0
3,2.0,0.0,0.0
4,3.0,0.0,0.0
5,4.0,0.0,0.0
6,5.0,0.0,0.0
7,6.0,0.0,0.0
8,7.0,0.0,0.0
9,8.0,0.0,0.0
10,9.0,0.0,0.0
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*ELEMENT,TYPE=C3D8,ELSET=ALLE
1,1,2,13,12,34,35,46,45
2,2,3,14,13,35,36,47,46
3,3,4,15,14,36,37,48,47
4,4,5,16,15,37,38,49,48
5,5,6,17,16,38,39,50,49
6,6,7,18,17,39,40,51,50
7,7,8,19,18,40,41,52,51
8,8,9,20,19,41,42,53,52
9,9,10,21,20,42,43,54,53
10,10,11,22,21,43,44,55,54
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*ELSET,ELSET=QT
1,2,3,4,5,6,7,8,9,10,11,12,13,14,15,16
17,18,19,20,21,22,23,24,25,26,27,28,29,30,31,32
33,34,35,36,37,38,39,40
*ELSET,ELSET=NI
41,42,43,44,45,46,47,48,49,50,51,52,53,54,55,56
57,58,59,60,61,62,63,64,65,66,67,68,69,70,71,72
73,74,75,76,77,78,79,80
*ELSET,ELSET=CUT
61,62,63,64,65,66,67,68,69,70,71,72,73,74,75,76
77,78,79,80
*NSET,NSET=LEFT
1,12,23,34,45,56,67,78,89,100,111,122,133,144,155
*NSET,NSET=RIGHT
11,22,33,44,55,66,77,88,99,110,121,132,143,154,165
*NSET,NSET=YSYM
1,2,3,4,5,6,7,8,9,10,11,34,35,36,37,38
39,40,41,42,43,44,67,68,69,70,71,72,73,74,75,76
77,100,101,102,103,104,105,106,107,108,109,110,133,134,135,136
137,138,139,140,141,142,143
*NSET,NSET=ZSYM
1,2,3,4,5,6,7,8,9,10,11,12,13,14,15,16
17,18,19,20,21,22,23,24,25,26,27,28,29,30,31,32
33
*MATERIAL,NAME=QT_REF
*ELASTIC
170000,.28
*PLASTIC
310,0
310,.1
*EXPANSION,ZERO=20
11.4e-6
*MATERIAL,NAME=NI_REF
*ELASTIC
205000,.31
*PLASTIC
73.75,0
105,.01
*EXPANSION,ZERO=20
13.3e-6
*SOLID SECTION,ELSET=QT,MATERIAL=QT_REF
*SOLID SECTION,ELSET=NI,MATERIAL=NI_REF
*INITIAL CONDITIONS,TYPE=TEMPERATURE
ALLN,20
** substrate_plastic
*STEP,NLGEOM,INC=100
*STATIC,SOLVER=SPOOLES
.1,1,1e-6,.25
*MODEL CHANGE,TYPE=ELEMENT,REMOVE
NI
*BOUNDARY
LEFT,1,1,0
RIGHT,1,1,0.03
YSYM,2,2,0
ZSYM,3,3,0
*TEMPERATURE
ALLN,20
*NODE PRINT,NSET=ALLN,FREQUENCY=99999
U,RF
*EL PRINT,ELSET=ALLE,FREQUENCY=99999
S,PEEQ,ME
*NODE FILE,FREQUENCY=99999
U
*EL FILE,FREQUENCY=99999
S,PEEQ
*RESTART,WRITE
*END STEP
** substrate_unload
*STEP,NLGEOM,INC=100
*STATIC,SOLVER=SPOOLES
.1,1,1e-6,.25
*BOUNDARY
LEFT,1,1,0
RIGHT,1,1,0
YSYM,2,2,0
ZSYM,3,3,0
*TEMPERATURE
ALLN,20
*NODE PRINT,NSET=ALLN,FREQUENCY=99999
U,RF
*EL PRINT,ELSET=ALLE,FREQUENCY=99999
S,PEEQ,ME
*NODE FILE,FREQUENCY=99999
U
*EL FILE,FREQUENCY=99999
S,PEEQ
*RESTART,WRITE
*END STEP
** substrate_reheat
*STEP,NLGEOM,INC=100
*STATIC,SOLVER=SPOOLES
.1,1,1e-6,.25
*BOUNDARY
LEFT,1,1,0
RIGHT,1,1,0
YSYM,2,2,0
ZSYM,3,3,0
*TEMPERATURE
ALLN,200
*NODE PRINT,NSET=ALLN,FREQUENCY=99999
U,RF
*EL PRINT,ELSET=ALLE,FREQUENCY=99999
S,PEEQ,ME
*NODE FILE,FREQUENCY=99999
U
*EL FILE,FREQUENCY=99999
S,PEEQ
*RESTART,WRITE
*END STEP
** deposit_coherent
*STEP,NLGEOM,INC=100
*STATIC,SOLVER=SPOOLES
.1,1,1e-6,.25
*MODEL CHANGE,TYPE=ELEMENT,ADD=STRAIN FREE
NI
*BOUNDARY
LEFT,1,1,0
RIGHT,1,1,0
YSYM,2,2,0
ZSYM,3,3,0
*TEMPERATURE
ALLN,200
*NODE PRINT,NSET=ALLN,FREQUENCY=99999
U,RF
*EL PRINT,ELSET=ALLE,FREQUENCY=99999
S,PEEQ,ME
*NODE FILE,FREQUENCY=99999
U
*EL FILE,FREQUENCY=99999
S,PEEQ
*RESTART,WRITE
*END STEP
** cold
*STEP,NLGEOM,INC=100
*STATIC,SOLVER=SPOOLES
.1,1,1e-6,.25
*BOUNDARY
LEFT,1,1,0
RIGHT,1,1,0
YSYM,2,2,0
ZSYM,3,3,0
*TEMPERATURE
ALLN,20
*NODE PRINT,NSET=ALLN,FREQUENCY=99999
U,RF
*EL PRINT,ELSET=ALLE,FREQUENCY=99999
S,PEEQ,ME
*NODE FILE,FREQUENCY=99999
U
*EL FILE,FREQUENCY=99999
S,PEEQ
*RESTART,WRITE
*END STEP
** cut
*STEP,NLGEOM,INC=100
*STATIC,SOLVER=SPOOLES
.1,1,1e-6,.25
*MODEL CHANGE,TYPE=ELEMENT,REMOVE
CUT
*BOUNDARY
LEFT,1,1,0
RIGHT,1,1,0
YSYM,2,2,0
ZSYM,3,3,0
*TEMPERATURE
ALLN,20
*NODE PRINT,NSET=ALLN,FREQUENCY=99999
U,RF
*EL PRINT,ELSET=ALLE,FREQUENCY=99999
S,PEEQ,ME
*NODE FILE,FREQUENCY=99999
U
*EL FILE,FREQUENCY=99999
S,PEEQ
*RESTART,WRITE
*END STEP
** loaded
*STEP,NLGEOM,INC=100
*STATIC,SOLVER=SPOOLES
.1,1,1e-6,.25
*BOUNDARY
LEFT,1,1,0
RIGHT,1,1,-0.0002
YSYM,2,2,0
ZSYM,3,3,0
*TEMPERATURE
ALLN,20
*NODE PRINT,NSET=ALLN,FREQUENCY=99999
U,RF
*EL PRINT,ELSET=ALLE,FREQUENCY=99999
S,PEEQ,ME
*NODE FILE,FREQUENCY=99999
U
*EL FILE,FREQUENCY=99999
S,PEEQ
*RESTART,WRITE
*END STEP
** unloaded
*STEP,NLGEOM,INC=100
*STATIC,SOLVER=SPOOLES
.1,1,1e-6,.25
*BOUNDARY
LEFT,1,1,0
RIGHT,1,1,0
YSYM,2,2,0
ZSYM,3,3,0
*TEMPERATURE
ALLN,20
*NODE PRINT,NSET=ALLN,FREQUENCY=99999
U,RF
*EL PRINT,ELSET=ALLE,FREQUENCY=99999
S,PEEQ,ME
*NODE FILE,FREQUENCY=99999
U
*EL FILE,FREQUENCY=99999
S,PEEQ
*RESTART,WRITE
*END STEP
